"Вариант 2"
P := 10^-4
V := 10^2
"в день"
T := 12
"дней"
S0 := (V*T)/P = 12000000
"Далее выполним неравенство"
S0 ≤ S
S == A^L
1.
A := 26
"Если пароль состоит из малых букв"
4.32*10^9 ≤ 26^L
log(4.32*10^9)/log(26) ≤ L
(log(4.32) + 9*log(10))/log(26) ≤ L
log(4.32)/log(26) + 9*log(10)/log(26) ≤ L
log(4.32)/log(26) + 9*log(10)/log(26) simplify → 6.80965741202
L := log(4.32)/log(26) + 9*log(10)/log(26) simplify → 6.80965741202
S0 ≤ S
S := A^L = 4.32e9
"Неравенство выполняется"
2.
A := 52
"Если пароль состоит из больших букв"
4.32*10^9 ≤ 52^L
log(4.32*10^9)/log(52) ≤ L
(log(4.32) + 9*log(10))/log(52) ≤ L
log(4.32)/log(52) + 9*log(10)/log(52) ≤ L
log(4.32)/log(52) + 9*log(10)/log(52) simplify → 5.61507282754
L := log(4.32)/log(52) + 9*log(10)/log(52) simplify → 5.61507282754
S0 ≤ S
S := A^L = 4.32e9
"Неравенство выполняется"
